### Eric Frizzell, efrizz@umd.edu
### LIGGGHTS script for tapping a prepared granular assembly
###
### Initialization

## Preliminaries

units 	si
atom_style 	granular

# the product of the processors must equal P, the number of processors used when running the file: mpirun -np 128 ...
processors 	1 128 1

# periodic x boundaries, fixed y boundaries, fixed -z for floor and fixed shrink wrap for ceiling
boundary 	p f fm

#LIGGGHTS-Public shouuld produce the same answers for any newton flag setting, besides round off
newton 	off

soft_particles yes
# communicate single - each processor acquires informaton for ghost atoms within a single distance of its sub domain - the default
# vel yes - communicate velocity info with ghost atoms
communicate 	single vel yes

## Declare domain

# -x +x -y +y -z +z : 2cm x, 2.0m y, 20cm z
# reg is the name of the region, block is the region type, unitx box means define in box units instead of lattice
# the slight negative in the z lower bound is to give room for the shake plate
region	reg block -.01 .01 0.0 2.0 -0.02 .55 units box

# read the desired restart file
read_restart ../2m_20cm_loose_sweep/restart_2m_loose_20cm_old.static

# neighbor skin style - atom pairs within a neighbor cutoff distance = force cutoff + skin distance, style = bin
neighbor	 0.000625 bin	 # half the radius of the smallest particle

# neigh_modify delay 0, this is the default, rebuild neighbor list every timestep
neigh_modify delay 0

## Material properties
fix            m1 all property/global youngsModulus peratomtype 5E6
fix            m2 all property/global poissonsRatio peratomtype 0.2
fix            m3 all property/global coefficientRestitution peratomtypepair 1 0.06
fix            m4 all property/global coefficientFriction peratomtypepair 1 1.0
fix            m5 all property/global characteristicVelocity scalar .01
fix            m6 all property/global cohesionEnergyDensity peratomtypepair 1 1000.0
fix             m7 all property/global coefficientRollingFriction peratomtypepair 1 0.8
fix             m8 all property/global coefficientRollingViscousDamping peratomtypepair 1 0.0

## Pair style
pair_style     gran model hertz tangential history cohesion sjkr rolling_friction epsd torsionTorque on
pair_coeff	* *  # the asterisks set force field coeefficients for all atom types

# timestep is 1 microsecond
timestep	0.000001

## Thermo settings
# thermo style custom says what thermo data we want printed at each thermo timestep - timestep, num atoms, kinetic energy, volume
thermo_style 	custom step atoms ke vol
# thermo output every 1000 timesteps
thermo		1000
# LIGGGHTS will ignore last particles and will not normalize against num atoms
thermo_modify	lost ignore norm no

## box walls - define simulation
fix		wall_y1 all wall/gran model hertz tangential history cohesion sjkr rolling_friction epsd primitive type 1 yplane 0.0 	# wall moves later
fix		wall_y2 all wall/gran model hertz tangential history cohesion sjkr rolling_friction epsd primitive type 1 yplane 2.00  	# "endcap"
fix		wall_z1 all wall/gran model hertz tangential history cohesion sjkr rolling_friction epsd primitive type 1 zplane 0.0  		# floor

## Particle and particle region definitions

# regions with some overlap, vertically segmented -x +x -y +y -z +z
region		reg1 block -0.01 0.01 0.0 0.4 0.0 0.30 units box

# particles and their distribution
fix		pts1 all particletemplate/sphere 15485863 atom_type 1 density constant 2500 radius constant 0.00125 # 0.000625 # 1.25mm r

fix            pdd1 all particledistribution/discrete 15487517 1 pts1 1.0


# region and insertion
group		nve_group region reg

fix             2 all gravity 1.625 vector 0.0 0.0 -1.0

# check for 10% of hertz and rayleigh time
fix ts_check all check/timestep/gran 1000 0.1 0.1

compute stressed all stress/atom
compute deltas all pair/gran/local id delta

# define output
dump            dmp all custom 500000 post/dump*.post id type x y z vx vy vz radius fx fy fz mass
dump            dumpstl1 all mesh/stl 500000 post_stl/dumpcad*.stl
dump dmp_local all local 500000 post_computes/dump_computes*.post c_deltas[1] c_deltas[2] c_deltas[4]


# remove insertion parameters and tap parameters
unfix m3
unfix m8
fix            m3a all property/global coefficientRestitution peratomtypepair 1 0.55
fix 		m8a all property/global coefficientRollingViscousDamping peratomtypepair 1 0.0

#dump            dmp_tap all custom 10000 tap/dump*.post id type x y z vx vy vz radius fx fy fz mass
# shake
region          reg_allother block -0.01 0.01 0.0 2.00 0.002 0.25 units box
group all_other region reg_allother

region floorRaft block -.01 .01 0.0 2.00 0.0 0.002
group floorFreeze region floorRaft

# set integrator groups, see in.shock_swave for more detail
run 1
reset_timestep 0
fix integration_1 all nve/sphere
run 1
reset_timestep 0
unfix integration_1

# define bender element wiggle
fix     integration_during_wiggle all_other nve/sphere
fix     shear_wiggle floorFreeze move wiggle 0 0 5.0E-4 0.0333333

# run for desired tap time
run 250000 every 1000000 "write_restart restart.static"

# unfix and go back to one integration group
unfix shear_wiggle
unfix integration_during_wiggle

fix integration_2 all nve/sphere

write_restart restart.static

run 100000

# write output file, to be passed to a shock script
write_restart restart.static

undump		dmp
undump		dumpstl1
undump		dmp_local
